// COMSOL Multiphysics 5.5.0.292 model "Untitled.mph"
// Outline of the model tree

Parameters
  d = 2[um]
  dc = 3.4[um]
  delta = 3.75[um]
  r = d/2
  rc = dc/2
  A0 = 1.4994
  B0 = 0.0070 [um^2]
  C0 = 0.0004 [um^4]
  Ae = 1.6933
  Be = 0.0078 [um^2]
  Ce = 0.0028 [um^4]
  lam = 1.3 [um]
  phi = 90 [deg]
  n0 = A0 + (B0/(lam^2)) + (C0/(lam^4) )
  ne = Ae + (Be/(lam^2)) + (Ce/(lam^4 ))
  epsinf = 9.75
  omega = 2*pi*c_const/lam
  c = 3e8 [m/s]
  omegap = 1.36e16 [rad/s]
  omegat = 1.45e14 [rad/s]
  epsau = epsinf - (((omegap)^2)/(omega*(omega+i*omegat)))
  nback = 1.48534
  deltam = sqrt(delta^2-(delta/2)^2)

Coordinate systems
  pml1: PML "Perfectly Matched Layer 1" on no domains | ScalingType = userDefined

Geometry
  geom1 "Geometry 1" (2D, length unit µm)
    c1: Circle | r = r
    arr1: Array | input = c1; size = 11; type = linear; linearsize = 11; displ = {delta, 0}
    del1: Delete "Delete Entities 1" | input = arr1(6)
    del2: Delete "Delete Entities 2" | input = arr1(7)
    del3: Delete "Delete Entities 3" | input = arr1(5)
    c2: Circle | pos = {delta/2, deltam}; r = r
    arr2: Array | input = c2; size = 10; type = linear; linearsize = 10; displ = {delta, 0}
    copy1: Copy | input = arr2; keep = on; displx = 0; disply = 0
    mov1: Move
      input = copy1(1), copy1(2), copy1(3), copy1(4), copy1(5), copy1(6), copy1(7), copy1(8), copy1(9)
      displx = delta/2
      disply = deltam
    copy2: Copy
      input = mov1(1), mov1(2), mov1(3), mov1(4), mov1(5), mov1(6), mov1(7), mov1(8)
      keep = on
      displx = 0
      disply = 0
    mov2: Move | input = copy2; displx = delta/2; disply = deltam
    copy3: Copy | input = mov2(1), mov2(2), mov2(3), mov2(4), mov2(5), mov2(6), mov2(7); keep = on; displx = 0; disply = 0
    mov3: Move | input = copy3; displx = delta/2; disply = deltam
    copy4: Copy | input = mov3(1), mov3(2), mov3(3), mov3(4), mov3(5), mov3(6); keep = on; displx = 0; disply = 0
    mov4: Move | input = copy4; displx = delta/2; disply = deltam
    copy5: Copy | input = mov4(1), mov4(2), mov4(3), mov4(4), mov4(5); keep = on; displx = 0; disply = 0
    mov5: Move | input = copy5; displx = delta/2; disply = deltam
    mir1: Mirror
      input = arr2(1), arr2(2), arr2(3), arr2(4), arr2(5), arr2(6), arr2(7), arr2(8), arr2(9), copy1(10), mov1, mov2, mov3, mov4, mov5
      keep = on
      axis = {0, 1}
    c3: Circle | pos = {delta*5, 0}; r = r
    c4: Circle | pos = {delta*5+delta, 0}; r = rc
    c5: Circle | pos = {delta*5-delta, 0}; r = rc
    r1: Rectangle | pos = {delta*5, 0}; base = center; size = {delta*12, delta*13}
    dif1: Difference
      input = r1
      input2 = arr1(1), arr1(10), arr1(11), arr1(2), arr1(3), arr1(4), arr1(8), arr1(9), arr2(1), arr2(2), arr2(3), arr2(4), arr2(5), arr2(6), arr2(7), arr2(8), arr2(9), c3, c4, c5, copy1(10), mir1, mov1, mov2, mov3, mov4, mov5
      keep = on
      intbnd = off
      edge = all
    del5: Delete "Delete Entities 5" | input = r1
    fin: Finalize "Form Union"

Materials
  mat5: Common "LC" on domains 36, 62
    def "Basic"
      relpermittivity = {(n0^2)*sin(phi)^2+(ne^2)*cos(phi)^2, (ne^2-n0^2)*sin(phi)*cos(phi), 0, (ne^2-n0^2)*sin(phi)*cos(phi), (n0^2)*cos(phi)^2+(ne^2)*sin(phi)^2, 0, 0, 0, n0^2}
      relpermeability = 1
      electricconductivity = 0
  mat6: Common "Air" on domains 2-35, 37-51, 53-61, 63-102
    def "Basic"
      relpermittivity = 1
      relpermeability = 1
      electricconductivity = 0
  mat7: Common "Gold" on domains 52
    def "Basic"
      electricconductivity = 0
      relpermeability = 1
      relpermittivity = epsau
  mat8: Common "Back" on domains 1
    def "Basic"
      electricconductivity = 0
      relpermeability = 1
      relpermittivity = nback^2

Physics
  ewfd: ElectromagneticWavesFrequencyDomain on all domains
    dependent variable E = {Ex, Ey, Ez}
    MeshControl.SizeControlParameter = UserDefined
    MeshControl.PhysicsControlledMeshMaximumElementSize = 1.5 [nm]
    wee1: WaveEquationElectric (default)
      DisplacementFieldModel = RelativePermittivity
      n_mat = from_mat
      ki_mat = from_mat
      minput_temperature = 288.15[K]
    pec1: PerfectElectricConductor (default)
    init1: init "Initial Values 1" (default)
    sctr1: Scattering "Scattering Boundary Condition 1" on boundaries 1-4
  ec: ConductiveMedia "Electric Currents" on all domains
    dependent variable V
    cucn1: CurrentConservation (default)
    ein1: ElectricInsulation (default)
    init1: init "Initial Values 1" (default)
    term1: Terminal on boundaries 3
    gnd1: Ground on boundaries 2

Mesh
  mesh1 "Mesh 1"
    size: MeshSizeDefault | hmax = 0.975; hmin = 0.00366; hcurve = 0.25; hgrad = 1.2; hauto = 2
    ftri1: FreeTri "Free Triangular 1" on domains 1
      size1: Size on domains 1 | hauto = 3
    ftri2: FreeTri "Free Triangular 2" on domains 36, 62
      size1: Size on domains 36, 62 | hauto = 2
    ftri3: FreeTri "Free Triangular 3" on domains 52
      size1: Size on domains 52 | hauto = 1
    ftri4: FreeTri "Free Triangular 4" on domains 2-35, 37-51, 53-61, 63-102
      size1: Size on domains 2-35, 37-51, 53-61, 63-102 | hauto = 3

Studies
  std1 "Study 1"
    param: Parametric "Parametric Sweep" | pname = lam; plistarr = range(1.1 [um],0.01 [um],1.3[um]); punit = m
    mode: ModeAnalysis | modeFreq = c_const/lam; neigs = 8; shift = 1.5

Solver configurations
  sol1 "Solution 1" (study std1)
    v1: Variables "Dependent Variables 1"
    e1: Eigenvalue "Eigenvalue Solver 1" | neigs = 8; shift = 1.5
      d1: Direct "Suggested Direct Solver (ewfd)"
  sol2 "Parametric Solutions 1" (study std1)

Datasets
  dset1: Solution | solution = sol1
  dset2: Solution | solution = sol2

Evaluation groups
  eg1: EvaluationGroup | data = dset1

Plots
  pg1: PlotGroup2D "Electric Field (ewfd)" | data = dset2
    surf1: Surface | expr = ewfd.normE
    arws1: ArrowSurface | expr = {ewfd.Ex, ewfd.Ey}
  pg2: PlotGroup2D "Electric Potential (ec)" | data = dset2
    surf1: Surface | expr = V